// SBML level 3 version 1

model AB_model()

  // Compartments:
  compartment cell = 1;

  // Species:
  species Am in cell = 0;
  species Ar in cell = 0;
  species Afr in cell = 0;
  species Bm in cell = 0;
  species Br in cell = 0;
  species Bfr in cell = 0;

  // Parameters:
  n1 = 0.1;
  g1 = 0.5;
  g2 = 0.03;
  m1 = 0.9;
  p1 = 0.2;
  m2a = 0.1;
  g3 = 0.9;
  m2b = 0.1;
  n3 = 10;
  FR = 0;
  m6 = 20;
  R = 0;
  m7 = 2;
  n2 = 0.4;
  g4 = 0.1;
  m3 = 0.5;
  p2 = 1;
  m4 = 0.3;
  m5 = 0.05;

  // Reactions:
  dtAm: => Am; n1*g1/(g1 + Bfr)*g2/(g2 + Afr) - m1*Am;  // modifiers: Bfr, Afr
  dtAr: => Ar; 0*p1*Am - Ar*(m2a*Bfr/(g3 + Bfr) + m2b) - n3*Ar*FR + m6*Afr*R + m7*Afr;  // modifiers: Am, Bfr, Afr
  dtAfr: => Afr; n3*Ar*FR - m6*R*Afr - m7*Afr - Afr*(m2a*Bfr/(g3 + Bfr) + m2b);  // modifiers: Ar, Bfr
  dtBm: => Bm; n2*g4/(g4 + Bfr) - m3*Bm;  // modifiers: Bfr
  dtBr: => Br; p2*Bm - m4*Br - n3*R*Br + m5*Bfr + m6*FR*Bfr;  // modifiers: Bm, Bfr
  dtBfr: => Bfr; n3*R*Br - m5*Bfr - m6*FR*Bfr - m4*Bfr;  // modifiers: Br
end
